# OpenSim document version 40000
ScaleTool S01:
  mass: 65 [kg]
  height: 1803.4
  age: 99
  notes: This is an example setup file for scale.exe.
  ModelScaler:
    apply: true
    scaling_order: measurements manualScale
    marker_file: ../Statics/S01_static.trc
    time_range: 1 3
    preserve_mass_distribution: true
    output_model_file: D:\Neuro-Robotics lab\Minh's research\Squat-pic-stand experiment\Outputs\gait2392_simbody_markers.osim
    output_scale_file: D:\Neuro-Robotics lab\Minh's research\Squat-pic-stand experiment\Outputs\Gait2392_Simbody\subject01_scaleSet_applied.xml
    MeasurementSet gait2392:
      Measurement torso: apply=true
        MarkerPair: markers=(V.Sacral Top.Head)
        BodyScale torso: axes=(X Y Z)
      Measurement pelvis: apply=true
        MarkerPair: markers=(R.ASIS L.ASIS)
        BodyScale pelvis: axes=(X Y Z)
      Measurement thigh: apply=true
        MarkerPair: markers=(R.ASIS R.Knee.Lat)
        MarkerPair: markers=(L.ASIS L.Knee.Lat)
        BodyScale femur_r: axes=(X Y Z)
        BodyScale femur_l: axes=(X Y Z)
      Measurement shank: apply=true
        MarkerPair: markers=(R.Knee.Lat R.Ankle.Lat)
        MarkerPair: markers=(L.Knee.Lat L.Ankle.Lat)
        BodyScale tibia_r: axes=(X Y Z)
        BodyScale talus_r: axes=(X Y Z)
        BodyScale tibia_l: axes=(X Y Z)
        BodyScale talus_l: axes=(X Y Z)
      Measurement foot: apply=true
        MarkerPair: markers=(R.Heel R.Toe.Tip)
        MarkerPair: markers=(L.Heel L.Toe.Tip)
        BodyScale calcn_r: axes=(X Y Z)
        BodyScale toes_r: axes=(X Y Z)
        BodyScale calcn_l: axes=(X Y Z)
        BodyScale toes_l: axes=(X Y Z)
    ScaleSet gait2392_Scale:
      Scale: scales=(1.14724 1.14724 1.14724) segment=femur_r apply=false
      Scale: scales=(0.988523 0.988523 0.988523) segment=tibia_r apply=false
      Scale: scales=(1.14724 1.14724 1.14724) segment=femur_l apply=false
      Scale: scales=(0.988523 0.988523 0.988523) segment=tibia_l apply=false
  MarkerPlacer:
    apply: true
    marker_file: ../Statics/S01_static.trc
    time_range: 1 3
    output_motion_file: D:\Neuro-Robotics lab\Minh's research\Squat-pic-stand experiment\Outputs\Gait2392_Simbody\subject01_static_output.mot
    output_model_file: D:\Neuro-Robotics lab\Minh's research\Squat-pic-stand experiment\Outputs\Gait2392_Simbody\subject01_simbody.osim
    max_marker_movement: -1
    IKTaskSet gait2392_Scale:
      IKMarkerTask Sternum: apply=false weight=1
      IKMarkerTask R.Acromium: apply=false weight=0.5
      IKMarkerTask L.Acromium: apply=false weight=0.5
      IKMarkerTask Top.Head: apply=true weight=20
      IKMarkerTask R.ASIS: apply=true weight=20
      IKMarkerTask L.ASIS: apply=true weight=20
      IKMarkerTask V.Sacral: apply=true weight=20
      IKMarkerTask R.Thigh.Upper: apply=false weight=1
      IKMarkerTask R.Thigh.Front: apply=false weight=1
      IKMarkerTask R.Thigh.Rear: apply=false weight=1
      IKMarkerTask R.Knee.Lat: apply=true weight=20
      IKMarkerTask R.Knee.Med: apply=true weight=20
      IKMarkerTask R.Shank.Upper: apply=false weight=1
      IKMarkerTask R.Shank.Front: apply=false weight=1
      IKMarkerTask R.Shank.Rear: apply=false weight=1
      IKMarkerTask R.Ankle.Lat: apply=true weight=20
      IKMarkerTask R.Ankle.Med: apply=true weight=20
      IKMarkerTask R.Heel: apply=true weight=20
      IKMarkerTask R.Midfoot.Sup: apply=false weight=1
      IKMarkerTask R.Midfoot.Lat: apply=false weight=1
      IKMarkerTask R.Toe.Lat: apply=false weight=1
      IKMarkerTask R.Toe.Med: apply=false weight=1
      IKMarkerTask R.Toe.Tip: apply=true weight=20
      IKMarkerTask L.Thigh.Upper: apply=false weight=1
      IKMarkerTask L.Thigh.Front: apply=false weight=1
      IKMarkerTask L.Thigh.Rear: apply=false weight=1
      IKMarkerTask L.Knee.Lat: apply=true weight=20
      IKMarkerTask L.Knee.Med: apply=true weight=20
      IKMarkerTask L.Shank.Upper: apply=false weight=1
      IKMarkerTask L.Shank.Front: apply=false weight=1
      IKMarkerTask L.Shank.Rear: apply=false weight=1
      IKMarkerTask L.Ankle.Lat: apply=true weight=20
      IKMarkerTask L.Ankle.Med: apply=true weight=20
      IKMarkerTask L.Heel: apply=true weight=20
      IKMarkerTask L.Midfoot.Sup: apply=false weight=1
      IKMarkerTask L.Midfoot.Lat: apply=false weight=1
      IKMarkerTask L.Toe.Lat: apply=false weight=1
      IKMarkerTask L.Toe.Med: apply=false weight=1
      IKMarkerTask L.Toe.Tip: apply=true weight=20
      IKCoordinateTask [values shared by the 5 below unless stated]: apply=false weight=1000 value_type=default_value
          value=0
      IKCoordinateTask subtalar_angle_r
      IKCoordinateTask mtp_angle_r
      IKCoordinateTask subtalar_angle_l
      IKCoordinateTask mtp_angle_l
      IKCoordinateTask lumbar_extension: value_type=manual_value
